*Heading
** Job name: Tra-2583 Model name: Model-3D
** Generated by: Abaqus/CAE 2021
*Preprint, echo=NO, model=NO, history=NO, contact=NO
**
** PARTS
**
*Part, name=Part-1
*Node
      1,          10.,          3.5,           0.
      2,          10.,           0.,           0.
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*Element, type=C3D8
  1,   92,  505, 1633,  433,    1,   25,  337,   52
  2,  505,  506, 1634, 1633,   25,   26,  338,  337
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*Nset, nset=_PickedSet12, internal, generate
    1,  3360,     1
*Elset, elset=_PickedSet12, internal, generate
    1,  2583,     1
** Section: UMAT
*Solid Section, elset=_PickedSet12, material=UMAT
,
*End Part
**
**
** ASSEMBLY
**
*Assembly, name=Assembly
**
*Instance, name=Part-1-1, part=Part-1
*End Instance
**
*Node
      1,           9.,           4.,           1.
*Nset, nset=RP
 1,
*Nset, nset=_PickedSet6, internal
 1,
*Nset, nset=_PickedSet7, internal, instance=Part-1-1
    1,    2,    3,    4,    5,    6
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*Elset, elset=_PickedSet7, internal, instance=Part-1-1
    1,    2,    3,    4,    5,    6
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*Nset, nset=_PickedSet8, internal, instance=Part-1-1
    9,   10,   11,   12,   21,   22
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*Elset, elset=_PickedSet8, internal, instance=Part-1-1
  496,  497,  498,  499,  500,  501
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*Nset, nset=_PickedSet9, internal, instance=Part-1-1
    2,    3,    5,    6,   10,   12
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*Elset, elset=_PickedSet9, internal, instance=Part-1-1
    9,   18,   27,   36,   45,   54
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*Nset, nset=_PickedSet10, internal, instance=Part-1-1, generate
    1,  3360,     1
*Elset, elset=_PickedSet10, internal, instance=Part-1-1, generate
    1,  2583,     1
*Nset, nset=_PickedSet11, internal
 1,
*Elset, elset=__PickedSurf5_S6, internal, instance=Part-1-1, generate
   1,  433,    9
*Surface, type=ELEMENT, name=_PickedSurf5, internal
__PickedSurf5_S6, S6
** Constraint: Constraint-1
*Coupling, constraint name=Constraint-1, ref node=_PickedSet6, surface=_PickedSurf5
*Kinematic
*End Assembly
**
** MATERIALS
**
*Material, name=Local_UMAT
*Depvar
     50,
*User Material, constants=9, unsymm
20000.,  0.3,   8.,  10.,   3.,   8., 0.45,   1.
   2.,
*Material, name=UMAT
*Depvar
     50,
*User Defined Field
*User Material, constants=10, unsymm
20000.,  0.3,   8.,  10.,   3.,   8., 0.45,   1.
   2.,   0.
**
** BOUNDARY CONDITIONS
**
** Name: BC-1 Type: Displacement/Rotation
*Boundary
_PickedSet7, 3, 3
** Name: BC-2 Type: Displacement/Rotation
*Boundary
_PickedSet8, 1, 1
** Name: BC-3 Type: Displacement/Rotation
*Boundary
_PickedSet9, 1, 1
_PickedSet9, 2, 2
** ----------------------------------------------------------------
*INITIAL CONDITIONS, TYPE=FIELD, VARIABLE=1
**
** STEP: Geo
**
*Step, name=Geo, nlgeom=NO
*Geostatic
**
** LOADS
**
** Name: Load-1   Type: Body force
*Dload
_PickedSet10, BY, -18.
**
** OUTPUT REQUESTS
**
*Restart, write, frequency=0
**
** FIELD OUTPUT: F-Output-1
**
*Output, field, frequency=2
*Node Output
RF, U
*Element Output, directions=YES
E, S, SDV
**
** HISTORY OUTPUT: H-Output-1
**
*Output, history, variable=PRESELECT
*End Step
** ----------------------------------------------------------------
**
** STEP: Load
**
*Step, name=Load, nlgeom=NO, inc=10000
*Static
0.005, 1., 1e-08, 0.005
**
** BOUNDARY CONDITIONS
**
** Name: Load Type: Displacement/Rotation
*Boundary
_PickedSet11, 2, 2, -0.06
**
** CONTROLS
**
*Controls, reset
*Controls, parameters=time incrementation
50, 50, 50, 50, 50, 50, 50, , , ,
**
** OUTPUT REQUESTS
**
*Restart, write, frequency=0
**
** FIELD OUTPUT: F-Output-1
**
*Output, field, frequency=3
*Node Output
RF, U
*Element Output, directions=YES
E, S, SDV
**
** HISTORY OUTPUT: H-Output-1
**
*Output, history, variable=PRESELECT
*End Step
